*Heading
** Job name: Job-2 Model name: Model-1
** Generated by: Abaqus/CAE 2023
*Preprint, echo=NO, model=NO, history=NO, contact=NO
**
** PARTS
**
*Part, name=Part-1
*Node
      1,   16.9424992,   -2.9124999
      2,       1.0575,  -5.55999994
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*Element, type=CPS3
1, 286, 292, 302
2, 288, 301, 273
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*Element, type=CPS4R
  6, 240, 281, 261, 234
  7,  22,  23, 229, 242
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*Nset, nset=Set-1
    1,    2,    3,    4,    9,   10
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*Elset, elset=Set-1
    1,    2,    3,    4,    5,    6
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*Nset, nset=Set-2
    1,    2,    3,    4,    5,    6
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*Elset, elset=Set-2, generate
  373,  1845,     1
** Section: Section-1
*Solid Section, elset=Set-1, material=Fibre
,
** Section: Section-2
*Solid Section, elset=Set-2, material=Matrice
,
*End Part
**
**
** ASSEMBLY
**
*Assembly, name=Assembly
**
*Instance, name=Part-1-1, part=Part-1
*End Instance
**
*Nset, nset=Set-1, instance=Part-1-1
   5,   8, 184, 185, 186, 187
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*Elset, elset=Set-1, instance=Part-1-1
  467,  566,  568,  585,  587, 1032
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*Nset, nset=Set-2, instance=Part-1-1
   6,   7, 136, 137, 138, 139
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*Elset, elset=Set-2, instance=Part-1-1
  452,  525,  546, 1137, 1628, 1658
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*End Assembly
**
** MATERIALS
**
*Material, name=Fibre
*Density
1750.,
*Elastic
230000., 0.3
*Material, name=Matrice
*Density
1200.,
*Elastic
4500., 0.4
** ----------------------------------------------------------------
**
** STEP: Step-1
**
*Step, name=Step-1, nlgeom=NO
*Static
1., 1., 1e-05, 1.
**
** BOUNDARY CONDITIONS
**
** Name: BC-1 Type: Displacement/Rotation
*Boundary
Set-1, 1, 1, 10.
** Name: BC-2 Type: Displacement/Rotation
*Boundary
Set-2, 1, 1, -10.
**
** OUTPUT REQUESTS
**
*Restart, write, frequency=0
**
** FIELD OUTPUT: F-Output-1
**
*Output, field, variable=PRESELECT
**
** HISTORY OUTPUT: H-Output-1
**
*Output, history, variable=PRESELECT
*End Step
